**
** ABAQUS Input Deck Generated by HyperMesh Version  : 2022.0.0.33
** Generated using HyperMesh-Abaqus Template Version : 2022.0.0.33
** Generated on 06-29-2026 at 09:31:39
**
**   Template:  ABAQUS/STANDARD 3D
**
*HEADING
No heading defined for this deck
*PREPRINT,CONTACT=NO,ECHO=NO,HISTORY=NO,MODEL=NO
*NODE
         1,  1.15           ,  1.0            ,  1.0
         2,  1.0            ,  0.0            ,  1.0
         3,  1.0            ,  1.0            ,  0.0
         4,  1.0            ,  0.0            ,  0.0
         5,  0.0            ,  1.0            ,  1.0
         6,  0.0            ,  0.0            ,  1.0
         7,  0.0            ,  1.0            ,  0.0
         8,  0.0            ,  0.0            ,  0.0
**HW_COMPONENT     ID=2     COLOR=3     NAME=Part-1-1_Set-1     PROPERTY=Part-1-1_Set-1
*ELEMENT,TYPE=C3D8R
         1,         5,         6,         8,         7,         1,         2,         4,         3
*ELSET, ELSET=HMprop_Part-1-1_Set-1
         1
**HM_set_by_property     3          2
*SOLID SECTION, ELSET=HMprop_Part-1-1_Set-1, CONTROLS = EC-1, MATERIAL=Material-1
,
**HW_FORMULA_SET     ID=2
*NSET, NSET=Part-1-1_Set-1, GENERATE
         1,         8,         1
** Section: Section-1
**
**
** ASSEMBLY
**
**
**
**HW_SET     ID=4
*NSET, NSET=Set-3
         6,
**HW_SET     ID=5
*NSET, NSET=Set-4
         4,
** Suppress the spurious transverse hourglass zero-energy mode.
** The 6 RBM constraints (fix u2 + Set-3 u1 + Set-4 u3) leave one
** uncontrolled hourglass mode -> constrained K is singular (cond~1e18),
** making transverse u1/u3 undetermined. node 8 (origin) has u1=0 in the
** physical Poisson solution, so pinning it removes the mode without bias.
*NSET, NSET=hgfix
         8,
**HW_FORMULA_SET     ID=8
*NSET, NSET=Part-1_Part-1-1-1
         2,         4,         6,         8
**HW_FORMULA_SET     ID=6
*NSET, NSET=fix
Part-1_Part-1-1-1,
**HW_FORMULA_SET     ID=9
*NSET, NSET=Part-1_Part-1-1-2
         1,         3,         5,         7
**HW_FORMULA_SET     ID=7
*NSET, NSET=load
Part-1_Part-1-1-2,
**HW_SET     ID=1
*ELSET, ELSET=Part-1-1_Set-1
         1,
**HW_SET     ID=3
*ELSET, ELSET=fix
         1,
**
** MATERIALS
**
**HMNAME MATS          1 Material-1     4
*MATERIAL, NAME=Material-1
*DENSITY
1000.0    ,0.0
*ELASTIC, TYPE = ISOTROPIC
21000000.0,0.3       ,0.0
**HMNAME PROPERTY          1 EC-1
**
** ELEMENT CONTROLS
**
*SECTION CONTROLS, NAME = EC-1, HOURGLASS = ENHANCED, ELEMENT DELETION = NO
1.0       ,1.0
*AMPLITUDE, NAME =Amp-1
0.0       ,0.0       ,1.0       ,1.0
**HMNAME CURVE          1 HM_Curve_Title_1
**HMNAME LOADSTEP          1 Step-1
*STEP, name=whatever
*MATRIX GENERATE, MASS, STIFFNESS
*MATRIX OUTPUT, MASS, STIFFNESS, FORMAT=MATRIX INPUT
*END STEP
*STEP, NAME = Step-1, NLGEOM = NO
*STATIC
1.0       ,1.0       ,1.0000E-05,1.0
**HWNAME LOADCOL          1 HM_Load_Cols_1
**HWCOLOR LOADCOL          1     3
*BOUNDARY
fix,2, ,0.0
**HWNAME LOADCOL          2 HM_Load_Cols_2
**HWCOLOR LOADCOL          2     4
*BOUNDARY
Set-3,1, ,0.0
**HWNAME LOADCOL          3 HM_Load_Cols_3
**HWCOLOR LOADCOL          3     5
*BOUNDARY
Set-4,3, ,0.0
** Pin spurious transverse hourglass mode (see hgfix NSET definition)
*BOUNDARY
hgfix,1, ,0.0
*CLOAD, AMPLITUDE = Amp-1
load,2,100.0
*OUTPUT, FIELD, VARIABLE = PRESELECT
*OUTPUT, HISTORY, VARIABLE = PRESELECT
*RESTART, WRITE, FREQUENCY =     0
*END STEP
